*Heading
 finee
** Job name: fine_mesh_1500 Model name: NACA4424_Airfoil2
** Generated by: Abaqus/CAE 2025
*Preprint, echo=NO, model=NO, history=NO, contact=NO
**
** PARTS
**
*Part, name=Plate
*Node
      1,  0.948040009, -0.00963999983
      2,           1.,           0.
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*Element, type=CPS3
   1, 203,   1, 195
   2, 195,   3, 190
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*Nset, nset=Set-1, generate
   1,  873,    1
*Elset, elset=Set-1, generate
    1,  1592,     1
** Section: platesection
*Solid Section, elset=Set-1, material=plate
,
*End Part
**
**
** ASSEMBLY
**
*Assembly, name=Assembly
**
*Instance, name=Plate-1, part=Plate
*End Instance
**
*End Assembly
**
** MATERIALS
**
*Material, name=plate
*Elastic
 2e+11, 0.3
** ----------------------------------------------------------------
**
** STEP: Step-1
**
*Step, name=Step-1, nlgeom=NO
airfoil
*Static
1., 1., 1e-05, 1.
**
** OUTPUT REQUESTS
**
*Restart, write, frequency=0
**
** FIELD OUTPUT: F-Output-1
**
*Output, field, variable=PRESELECT
**
** HISTORY OUTPUT: H-Output-1
**
*Output, history, variable=PRESELECT
*End Step
